# min | avg | max | min | avg | max
# [component: outputs FitNUM]
# [component: outputs Tab]
# [component: outputs Fit]
v(t) := t + 53
t := 0, 1*10^-7 .. 1*10^-3
# % | Символьная фитнесс-функция | Численная Фитнесс-функция
# Экспериментальные данные и подобранная кривая
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%
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Pop
